// SBML level 2 version 4

model Kinetic_modelling_of_Amadori_degradation()
  // Martins2003_AmadoriDegradation

  // Compartments:
  compartment compartment = 1;

  // Species:
  species DFG2 in compartment = 9;
  species Cn2 in compartment = 0;
  species Gly2 in compartment = 0;
  species FA2 in compartment = 0;
  species AA2 in compartment = 0;
  species Man2 in compartment = 0;
  species MG2 in compartment = 0;
  species Mel2 in compartment = 0;
  species Fru2 in compartment = 0;

  // Reactions:
  v3r: DFG2 => Gly2 + Cn2; k3*DFG2;
    k3 = 0.0155;
  v4r: DFG2 => Gly2 + Cn2 + FA2; p4*DFG2;
    p4 = 0.0017;
  v7r: DFG2 => Gly2 + Cn2 + AA2; p7*DFG2;
    p7 = 0.0147;
  v10r: DFG2 => Gly2 + Man2; p10*DFG2;
    p10 = 0.0015;
  v11r: DFG2 => Gly2 + FA2; p11*DFG2;
    p11 = 0.0024;
  v12r: Man2 => Cn2 + FA2; k12*Man2;
    k12 = 0.0008;
  v14r: Gly2 + Cn2 => Mel2; k14*Cn2*Gly2;
    k14 = 0.0034;
  v15r: Cn2 => AA2 + FA2 + MG2; k15*Cn2;
    k15 = 0.0159;
  v16r: DFG2 => Gly2 + Fru2; p16*DFG2;
    p16 = 0.000925;

  // Unit definitions:
  unit substance = 1e-6 mole; substance is "micromole (default)";
  unit time = 60 second; time is "minute (default)";
end
